// COMSOL Multiphysics 6.2.0.339 model "Negative Constant.mph"
// Outline of the model tree

Parameters
  n = 1  // Number of cells horizontal
  m = 1  // Number of cells vertical
  ds = 0.5[mm]  // Maximum mesh size
  Lx = 10*n-0.5*(n-1)  // Length of structure
  Ly = 3*m-0.5*(m-1)  // Width of structure
  M = 10[kA/m]  // Magnetisation of elastomer
  Bext = 31.847[kA/m]  // External magnetic field strength
  dt = 0.01[s]  // Time step
  p = 5  // Array dimensions

Functions
  an1: Analytic "Increasing" | funcname = inc; expr = Bext*x/5; fununit = A/m; argunit = s
  an2: Analytic "Sinusoidal" | funcname = sino; expr = Bext*sin(3*pi*x/5); fununit = A/m; argunit = s
  an3: Analytic "Increasing" | funcname = inc; expr = Bext*x/5; fununit = A/m; argunit = s

Probes
  point1: Point "Vertical Displacement" on points 28, 74, 120, 166, 212
    expr = v
    unit = mm
    descr = Displacement field, Y-component
    frame = spatial
    table = tbl1
  bnd1: Boundary "Horizontal Displacement" on boundaries 342-347
    expr = u
    unit = mm
    descr = Displacement field, X-component
    frame = spatial
    table = tbl1
  bnd2: Boundary "Member Displacement" (disabled) on no boundaries
    expr = v
    unit = mm
    descr = Displacement field, Y-component
    frame = spatial
    table = tbl1

Geometry
  geom1 "Geometry 1" (2D, length unit mm)
    r1: Rectangle | size = {5, 1.5}
    e1: Ellipse | pos = {1.1, 0}; semiaxes = {0.6, 1}
    r2: Rectangle | pos = {1.1, 0}; size = {3.9, 1}
    dif1: Difference | input = r1; input2 = e1, r2
    mir1: Mirror | input = dif1; keep = on; specify = edge; edge = dif1(1) boundaries 2; axis = {1, 0}
    mir2: Mirror | input = dif1, mir1; keep = on; specify = edge; edge = dif1(1) boundaries 5; axis = {1, 0}
    mov1: Move | input = dif1, mir1, mir2; displx = 0; disply = -1.5
    arr1: Array | input = mov1; size = {p, p}; fullsize = {p, p}; displ = {9.5, -2.5}
    sq1: Square "Magnetic Domain" | pos = {Lx/2, -Ly/2}; base = center; size = 1.5[m]
    r3: Rectangle "Member" (disabled) | pos = {10, -1.75}; size = {10, 0.5}
    fin: Finalize "Form Union"
    ige1: IgnoreEdges
      input = fin(1) boundaries 9, 11, 15, 17, 21, 23, 27, 29, 61-68, 102, 104, 107, 109, 112, 114, 117, 119, 150-157, 191, 193, 196, 198, 201, 203, 206, 208, 239-246, 280, 282, 285, 287, 290, 292, 295, 297, 328-335, 369, 371, 374, 376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

Materials
  mat1: Common "Air" on domains 1-142
    def "Basic"
      thermalexpansioncoefficient = alpha_p(pA,T)
      molarmass = 0.02897[kg/mol]
      bulkviscosity = muB(T)
      relpermeability = 1
      relpermittivity = 1
      dynamicviscosity = eta(T)
      ratioofspecificheat = 1.4
      electricconductivity = 0[S/m]
      heatcapacity = Cp(T)
      density = rho(pA,T)
      thermalconductivity = k(T)
      soundspeed = cs(T)
      eta: Piecewise | arg = T; pieces = {200.0, 1600.0, -8.38278E-7+8.35717342E-8*T^1-7.69429583E-11*T^2+4.6437266E-14*T^3-1.06585607E-17*T^4}; argunit = K; fununit = Pa*s
      Cp: Piecewise | arg = T; pieces = {200.0, 1600.0, 1047.63657-0.372589265*T^1+9.45304214E-4*T^2-6.02409443E-7*T^3+1.2858961E-10*T^4}; argunit = K; fununit = J/(kg*K)
      rho: Analytic | expr = pA*0.02897/R_const[K*mol/J]/T; args = {pA, T}; fununit = kg/m^3; argunit = {Pa, K}
      k: Piecewise | arg = T; pieces = {200.0, 1600.0, -0.00227583562+1.15480022E-4*T^1-7.90252856E-8*T^2+4.11702505E-11*T^3-7.43864331E-15*T^4}; argunit = K; fununit = W/(m*K)
      cs: Analytic | expr = sqrt(1.4*R_const[K*mol/J]/0.02897*T); args = T; fununit = m/s; argunit = K
      an1: Analytic | funcname = alpha_p; expr = -1/rho(pA,T)*d(rho(pA,T),T); args = {pA, T}; fununit = 1/K; argunit = {Pa, K}
      an2: Analytic "Analytic 2a" | funcname = muB; expr = 0.6*eta(T); args = T; fununit = Pa*s; argunit = K
    RefractiveIndex
      n = 1
      ki = 0
    NonlinearModel
      BA = def.gamma-1
    idealGas
      Rs = R_const/Mn
      heatcapacity = Cp(T)
      ratioofspecificheat = 1.4
      molarmass = 0.02897[kg/mol]
      Cp: Piecewise | arg = T; pieces = {200.0, 1600.0, 1047.63657-0.372589265*T^1+9.45304214E-4*T^2-6.02409443E-7*T^3+1.2858961E-10*T^4}; argunit = K; fununit = J/(kg*K)
  mat2: Common "Elastomer" on domains 2-7, 13-38, 44-69, 75-100, 106-131, 137-142
    def "Basic"
      electricconductivity = 0.0
      relpermittivity = 3
      density = 1500
    Enu "Young's modulus and Poisson's ratio"
      E = 0.1[MPa]
      nu = 0.0

Physics
  mf: InductionCurrents "Magnetic Fields" on all domains
    dependent variable A = {Ax, Ay, Az}
    fsp1: FreeSpace (default)
    mi1: MagneticInsulation (default)
    init1: init "Initial Values 1" (default)
    als1: AmperesLawSolid "Ampere Right" on domains 3, 5, 7, 13, 15, 17, 34, 36, 38, 44, 46, 48, 65, 67, 69, 75, 77, 79, 96, 98, 100, 106, 108, 110, 127, 129, 131, 137, 139, 141
      ConstitutiveRelationBH = Magnetization
      M = {M, 0, 0}
    als2: AmperesLawSolid "Ampere Left" on domains 2, 4, 6, 14, 16, 18, 33, 35, 37, 45, 47, 49, 64, 66, 68, 76, 78, 80, 95, 97, 99, 107, 109, 111, 126, 128, 130, 138, 140, 142
      ConstitutiveRelationBH = Magnetization
      M = {-M, 0, 0}
    mfb1: MagneticFieldBoundary "Magnetic Field" on boundaries 1, 348 | H0 = {0, -Bext, 0}
  solid: SolidMechanics on domains 2-7, 13-38, 44-69, 75-100, 106-131, 137-142
    dependent variable u = {u, v, w}
    lemm1: LinearElasticModel "Linear Elastic Material 1" (default)
      vis1: Viscoelasticity on all domains | Gvm = 0.7[MPa]; tauvm = 0.1[s]
    free1: Free (default)
    init1: init "Initial Values 1" (default)
    fix1: Fixed "Fixed Constraint 1" on boundaries 4, 6, 8, 10, 12, 14

Multiphysics
  mmcpl1: Magnetomechanics on all domains | Solid_physics = solid; MagneticFields_physics = mf

Mesh
  mesh1 "Mesh 1"
    size: MeshSizeDefault | hmax = 101; hmin = 0.45; hcurve = 0.3; hgrad = 1.3
    ftri2: FreeTri "Structure Mesh" on domains 2-7, 13-38, 44-69, 75-100, 106-131, 137-142
      size1: Size on domains 2-7, 13-38, 44-69, 75-100, 106-131, 137-142 | hmax = ds; custom = on
    ftri1: FreeTri "Free Triangular 1" on remaining entities | smoothmaxiter = 4; smoothmaxdepth = 4

Studies
  std3 "Time Dependent Study"
    time: Transient "Time Dependent" | tlist = range(0,5.0e-3,5); usertol = on; rtol = 0.001

Solver configurations
  sol23 "Solution 23" (study std3)
    v1: Variables "Dependent Variables 1"
      comp1_u: Field "Displacement Field (comp1.u)" | scalemethod = manual; scaleval = 1e-2*2.12132034356
    t1: Time "Time-Dependent Solver 1"
      tlist = range(0,5.0e-3,5)
      tout = tstepsclosest
      rtol = 0.001
      tstepsbdf = strict
      initialstepbdf = dt
      estrat = exclude
      tstepsgenalpha = manual
      timestepgenalpha = dt
      dDef: Direct
      se1: Segregated
        ss1: SegregatedStep "Magnetic Potential" | segvar = {comp1_A}; linsolver = d1; subjtech = onevery
        ss2: SegregatedStep "Displacement Field" | segvar = {comp1_u}; linsolver = dDef; subjtech = onevery
      d1: Direct | linsolver = pardiso

Datasets
  dset1: Solution | solution = none
  dset3: Solution | solution = none
  dset4: Solution | solution = sol23
  dset5: Solution "Probe Solution 5" | solution = sol23
  avh1: Average "Horizontal Displacement" on boundaries 342-347 | data = dset5
  avh2: Average "Vertical Displacement" on points 28, 74, 120, 166, 212 | data = dset5
  avh3: Average "Member Displacement" | data = dset5

Derived values
  gev1: EvalGlobal "B Signal" | data = dset4; table = tbl2; expr = -Bext; unit = kA/m
  pev2: EvalPoint "Vertical Displacement"
    data = avh2
    table = tbl2
    expr = v
    unit = mm
    descr = Displacement field, Y-component
  pev3: EvalPoint "Horizontal Displacement" | data = avh1; table = tbl2; expr = u

Tables
  tbl1: Table "Probe Table 1"
    Time (s) | Displacement field, Y-component (mm), Vertical Displacement | Displacement field, X-component (mm), Horizontal Displacement
    0 | -0.000101441 | 1.03164e-05
    0.000528793 | -0.01952 | 0.000557902
    0.000986706 | -0.0434946 | 0.000785289
    0.00144462 | -0.0700357 | 0.00040388
    0.00236045 | -0.108433 | -0.00333624
    0.00310587 | -0.123425 | -0.00735248
    0.00385129 | -0.123209 | -0.0106591
    0.00442564 | -0.1164 | -0.0122214
    0.005 | -0.106188 | -0.0126008
    0.00614871 | -0.0906536 | -0.0100741
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  tbl2: Table "Master Table"
    // B Signal
    Time (s) | -Bext (kA/m) | Displacement field, Y-component (mm), Vertical Displacement | Displacement field, X-component (mm), Horizontal Displacement
    0 | -31.847 | -0.000101441 | 1.03164e-05
    0.005 | -31.847 | -0.106188 | -0.0126008
    0.01 | -31.847 | -0.0957867 | -0.00258889
    0.015 | -31.847 | -0.101984 | -0.00691188
    0.02 | -31.847 | -0.106705 | -0.00698481
    0.025 | -31.847 | -0.112501 | -0.00756662
    0.03 | -31.847 | -0.118585 | -0.00832455
    0.035 | -31.847 | -0.124882 | -0.00908236
    0.04 | -31.847 | -0.131272 | -0.00984854
    0.045 | -31.847 | -0.137628 | -0.0106383
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
Plots
  pg1: PlotGroup1D "Probe Plot Group 1"
    tblp1: Table "Probe Table Graph 1" | table = tbl1; xaxisdata = auto; plotcolumns = {2, 3}
  pg2: PlotGroup2D "(-ve) Constant Field (p=5)" | data = dset4
    surf1: Surface | expr = solid.disp
  pg3: PlotGroup2D "Member Displacement" on domains 2-7, 13-38, 44-69, 75-100, 106-131, 137-142 | data = dset4
    surf2: Surface "Cell Domain" | data = dset4; expr = abs(v)
    arws1: ArrowSurface | expr = {u, v}; descr = Displacement field; ynumber = 1

Exports
  anim1: Animation "Preview" | target = player
  anim2: Animation "GIF Generator"
    giffilename = X:\My Documents\Final_Results\3.3.1.Array_of_Cells\Negative Constant\Deformation.gif
    width = 1584
    height = 814
  anim3: Animation "Image Sequencer" | type = imageseq; framesel = all; width = 3960; height = 2035