// COMSOL Multiphysics 6.2.0.339 model "n8.mph"
// Outline of the model tree

Parameters
  n = 8  // Number of cells horizontal
  m = 1  // Number of cells vertical
  ds = 0.5[mm]  // Maximum mesh size
  Lx = 10*n-0.5*(n-1)  // Length of structure
  Ly = 3*m-0.5*(m-1)  // Width of structure
  M = 10[kA/m]  // Magnetisation of elastomer
  Bext = 31.847[kA/m]  // External magnetic field strength
  dt = 0.01[s]  // Time step
  p = 5  // Array dimensions

Functions
  an1: Analytic "Increasing" | funcname = inc; expr = Bext*x/5; fununit = A/m; argunit = s
  an2: Analytic "Sinusoidal" | funcname = sino; expr = Bext*sin(3*pi*x/5); fununit = A/m; argunit = s
  an3: Analytic "Increasing" | funcname = inc; expr = Bext*x/5; fununit = A/m; argunit = s

Probes
  point1: Point "Vertical Displacement" on points 12, 26, 40, 54, 68, 82, 96, 110
    expr = v
    unit = mm
    descr = Displacement field, Y-component
    frame = spatial
    table = tbl1
  bnd1: Boundary "Horizontal Displacement" on boundaries 137, 138
    expr = u
    unit = mm
    descr = Displacement field, X-component
    frame = spatial
    table = tbl1
  bnd2: Boundary "Member Displacement" (disabled) on no boundaries
    expr = v
    unit = mm
    descr = Displacement field, Y-component
    frame = spatial
    table = tbl1

Geometry
  geom1 "Geometry 1" (2D, length unit mm)
    r1: Rectangle | size = {5, 1.5}
    e1: Ellipse | pos = {1.1, 0}; semiaxes = {0.6, 1}
    r2: Rectangle | pos = {1.1, 0}; size = {3.9, 1}
    dif1: Difference | input = r1; input2 = e1, r2
    mir1: Mirror | input = dif1; keep = on; specify = edge; edge = dif1(1) boundaries 2; axis = {1, 0}
    mir2: Mirror | input = dif1, mir1; keep = on; specify = edge; edge = dif1(1) boundaries 5; axis = {1, 0}
    mov1: Move | input = dif1, mir1, mir2; displx = 0; disply = -1.5
    arr1: Array | input = mov1; size = {n, m}; fullsize = {n, m}; displ = {9.5, -2.5}
    sq1: Square "Magnetic Domain" | pos = {Lx/2, -Ly/2}; base = center; size = 1.5[m]
    r3: Rectangle "Member" (disabled) | pos = {10*5 - 0.5*(5-1), -13/2-0.25}; size = {10, 0.5}
    fin: Finalize "Form Union"
    ige1: IgnoreEdges (disabled)
      input = fin 9, 11, 15, 17, 21, 23, 27, 29, 61, 62, 63, 64, 65, 66, 67, 68, 102, 104, 107, 109, 112, 114, 117, 119, 150, 151, 152, 153, 154, 155, 156, 157, 191, 193, 196, 198, 201, 203, 206, 208, 239, 240, 241, 242, 243, 244, 245, 246, 280, 282, 285, 287, 290, 292, 295, 297, 328, 329, 330, 331, 332, 333, 334, 335, 369, 371, 374, 376, 379, 381, 384, 386, 417, 418, 419, 420, 421, 422, 423, 424

Materials
  mat1: Common "Air" on domains 1-55
    def "Basic"
      thermalexpansioncoefficient = alpha_p(pA,T)
      molarmass = 0.02897[kg/mol]
      bulkviscosity = muB(T)
      relpermeability = 1
      relpermittivity = 1
      dynamicviscosity = eta(T)
      ratioofspecificheat = 1.4
      electricconductivity = 0[S/m]
      heatcapacity = Cp(T)
      density = rho(pA,T)
      thermalconductivity = k(T)
      soundspeed = cs(T)
      eta: Piecewise | arg = T; pieces = {200.0, 1600.0, -8.38278E-7+8.35717342E-8*T^1-7.69429583E-11*T^2+4.6437266E-14*T^3-1.06585607E-17*T^4}; argunit = K; fununit = Pa*s
      Cp: Piecewise | arg = T; pieces = {200.0, 1600.0, 1047.63657-0.372589265*T^1+9.45304214E-4*T^2-6.02409443E-7*T^3+1.2858961E-10*T^4}; argunit = K; fununit = J/(kg*K)
      rho: Analytic | expr = pA*0.02897/R_const[K*mol/J]/T; args = {pA, T}; fununit = kg/m^3; argunit = {Pa, K}
      k: Piecewise | arg = T; pieces = {200.0, 1600.0, -0.00227583562+1.15480022E-4*T^1-7.90252856E-8*T^2+4.11702505E-11*T^3-7.43864331E-15*T^4}; argunit = K; fununit = W/(m*K)
      cs: Analytic | expr = sqrt(1.4*R_const[K*mol/J]/0.02897*T); args = T; fununit = m/s; argunit = K
      an1: Analytic | funcname = alpha_p; expr = -1/rho(pA,T)*d(rho(pA,T),T); args = {pA, T}; fununit = 1/K; argunit = {Pa, K}
      an2: Analytic "Analytic 2a" | funcname = muB; expr = 0.6*eta(T); args = T; fununit = Pa*s; argunit = K
    RefractiveIndex
      n = 1
      ki = 0
    NonlinearModel
      BA = def.gamma-1
    idealGas
      Rs = R_const/Mn
      heatcapacity = Cp(T)
      ratioofspecificheat = 1.4
      molarmass = 0.02897[kg/mol]
      Cp: Piecewise | arg = T; pieces = {200.0, 1600.0, 1047.63657-0.372589265*T^1+9.45304214E-4*T^2-6.02409443E-7*T^3+1.2858961E-10*T^4}; argunit = K; fununit = J/(kg*K)
  mat2: Common "Elastomer" on domains 2, 3, 5-10, 12-17, 19-24, 26-31, 33-38, 40-45, 47-52, 54, 55
    def "Basic"
      electricconductivity = 0.0
      relpermittivity = 3
      density = 1500
    Enu "Young's modulus and Poisson's ratio"
      E = 0.1[MPa]
      nu = 0.0

Physics
  mf: InductionCurrents "Magnetic Fields" on all domains
    dependent variable A = {Ax, Ay, Az}
    fsp1: FreeSpace (default)
    mi1: MagneticInsulation (default)
    init1: init "Initial Values 1" (default)
    als1: AmperesLawSolid "Ampere Right" on domains 3, 5, 10, 12, 17, 19, 24, 26, 31, 33, 38, 40, 45, 47, 52, 54
      ConstitutiveRelationBH = Magnetization
      M = {M, 0, 0}
    als2: AmperesLawSolid "Ampere Left" on domains 2, 6, 9, 13, 16, 20, 23, 27, 30, 34, 37, 41, 44, 48, 51, 55
      ConstitutiveRelationBH = Magnetization
      M = {-M, 0, 0}
    mfb1: MagneticFieldBoundary "Magnetic Field" on boundaries 1, 139 | H0 = {0, Bext, 0}
  solid: SolidMechanics on domains 2, 3, 5-10, 12-17, 19-24, 26-31, 33-38, 40-45, 47-52, 54, 55
    dependent variable u = {u, v, w}
    lemm1: LinearElasticModel "Linear Elastic Material 1" (default)
      vis1: Viscoelasticity on all domains | Gvm = 0.7[MPa]; tauvm = 0.1[s]
    free1: Free (default)
    init1: init "Initial Values 1" (default)
    fix1: Fixed "Fixed Constraint 1" on boundaries 4, 6
    disp1: Displacement1 "Prescribed Displacement 1" on boundaries 17, 19, 34, 36, 51, 53, 68, 70, 85, 87, 102, 104, 119, 121
      Direction = {free, prescribed, free}

Multiphysics
  mmcpl1: Magnetomechanics on all domains | Solid_physics = solid; MagneticFields_physics = mf

Mesh
  mesh1 "Mesh 1"
    size: MeshSizeDefault | hmax = 101; hmin = 0.45; hcurve = 0.3; hgrad = 1.3
    ftri2: FreeTri "Structure Mesh" on domains 2, 3, 5-10, 12-17, 19-24, 26-31, 33-38, 40-45, 47-52, 54, 55
      size1: Size on domains 2, 3, 5-10, 12-17, 19-24, 26-31, 33-38, 40-45, 47-52, 54, 55 | hmax = ds; custom = on
    ftri1: FreeTri "Free Triangular 1" on remaining entities | smoothmaxiter = 4; smoothmaxdepth = 4

Studies
  std3 "Time Dependent Study"
    time: Transient "Time Dependent" | tlist = range(0,5.0e-3,5); usertol = on; rtol = 0.001

Solver configurations
  sol23 "Solution 23" (study std3)
    v1: Variables "Dependent Variables 1"
      comp1_u: Field "Displacement Field (comp1.u)" | scalemethod = manual; scaleval = 1e-2*2.12132034356
    t1: Time "Time-Dependent Solver 1"
      tlist = range(0,5.0e-3,5)
      tout = tstepsclosest
      rtol = 0.001
      tstepsbdf = strict
      initialstepbdf = dt
      estrat = exclude
      tstepsgenalpha = manual
      timestepgenalpha = dt
      dDef: Direct
      se1: Segregated
        ss1: SegregatedStep "Magnetic Potential" | segvar = {comp1_A}; linsolver = d1; subjtech = onevery
        ss2: SegregatedStep "Displacement Field" | segvar = {comp1_u}; linsolver = dDef; subjtech = onevery
      d1: Direct | linsolver = pardiso

Datasets
  dset1: Solution | solution = none
  dset3: Solution | solution = none
  dset4: Solution | solution = sol23
  dset5: Solution "Probe Solution 5" | solution = sol23
  avh1: Average "Horizontal Displacement" on boundaries 137, 138 | data = dset5
  avh2: Average "Vertical Displacement" on points 12, 26, 40, 54, 68, 82, 96, 110 | data = dset5
  avh3: Average "Member Displacement" | data = dset5

Derived values
  pev2: EvalPoint "Vertical Displacement"
    data = avh2
    table = tbl1
    expr = v
    unit = mm
    descr = Displacement field, Y-component
  pev3: EvalPoint "Horizontal Displacement" | data = avh1; table = tbl1; expr = u

Tables
  tbl1: Table "Probe Table 1"
    Time (s) | Displacement field, Y-component (mm), Vertical Displacement | Displacement field, X-component (mm), Horizontal Displacement
    0 | 0.000104787 | -6.78035e-06
    0.000479743 | 0.0160787 | -0.00198607
    0.000893512 | 0.036105 | -0.00421166
    0.00130728 | 0.0589397 | -0.00764319
    0.00172105 | 0.081456 | -0.0125095
    0.00254859 | 0.10821 | -0.0252141
    0.00314602 | 0.115797 | -0.0344926
    0.00374346 | 0.113285 | -0.0423369
    0.0043409 | 0.104466 | -0.0478208
    0.00467045 | 0.0984194 | -0.0500593
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
Plots
  pg1: PlotGroup1D "Probe Plot Group 1"
    tblp1: Table "Probe Table Graph 1" | table = tbl1; xaxisdata = auto; plotcolumns = {2, 3}
  pg4: PlotGroup2D "Displacement (m=1, n=8)" | data = dset4
    surf1: Surface | expr = solid.disp

Exports
  anim1: Animation "Preview" | target = player
  anim2: Animation "GIF Maker"
    giffilename = X:\My Documents\Final_Results\3.4.1.Vary_n\n8\Deformation.gif
    width = 1584
    height = 500
  anim3: Animation "Image Sequencer" | type = imageseq; width = 3960; height = 1600